// COMSOL Multiphysics 6.4.0.293 model "sensitivity.mph"
// Outline of the model tree

Parameters
  L = 102e-3 [m]  // Length of cell (m)
  r = 24e-3 [m]  // Radius of cell (m)
  sig = 1 [S/m]  // Test conductivity (S/m)
  p = 1e-2 [m]  // Position of potential electrodes (m)
  E0 = 1 [V/m]  // External field strength (V/m)
  epsr = 80  // Relative permittivity (-)
  k = pi*r^2/(2*p)  // Geometry factor of cell (m)
  L_disp = 0.05*L/2  // Length of test volume (m)
  r_disp = 0.1*r/2  // Radius of test volume (m)
  x_disp = (L/2-0.5*L_disp)  // x-position of test volume (m)
  y_disp = (r-2*r_disp)-2*r_disp*(N-1)  // y-position of test volume (m)
  N = 19  // Shift index y-direction (-)

Couplings
  intop1: Integration on boundaries 4

Probes
  point1: Point "Punkt-Messsonde 1" on points 13
    expr = V
    unit = V
    descr = Elektrisches Potential
    frame = spatial
    table = tbl3
  point2: Point "Punkt-Messsonde 2" on points 12
    expr = V
    unit = V
    descr = Elektrisches Potential
    frame = spatial
    table = tbl3

Geometry
  geom1 "Geometrie 1" (3D, length unit m)
    cyl1: Cylinder "Zylinder 1" | r = r; h = L
    pt1: Point "Punkt 1" | p = {0, r, L/2+p}
    pt2: Point "Punkt 2" | p = {0, r, L/2-p}
    cyl2: Cylinder | r = r_disp; h = L_disp; pos = {0, y_disp, x_disp}
    fin: Finalize "Vereinigung bilden"

Physics
  ec: ConductiveMedia "Elektrische Ströme" on all domains
    dependent variable V
    cucn1: CurrentConservationFluid "Stromerhaltung 1" (default)
      sigma_mat = userdef
      sigma = if(dom==1,sig,10*sig)
      epsilonr_mat = userdef
      epsilonr = epsr
    ein1: ElectricInsulation "Elektrische Isolation 1" (default)
    init1: init "Anfangswerte 1" (default)
    pot1: ElectricPotential "Elektrisches Potential 1" on boundaries 3, 4 | V0 = -E0*z

Mesh
  mesh1 "Netz 1" (physics-controlled)
    size: MeshSizeDefault "Größe" | hauto = 1

Studies
  std1 "Studie 1"
    param: Parametric "Parametric Sweep"
      sweeptype = filled
      pname = x_disp
      plistarr = range(0.5*L_disp,L_disp,L-1.5*L_disp)
      punit = m
    stat: Stationary "Stationär"

Solver configurations
  sol1 "Lösung 1" (study std1)
    v1: Variables "Dependent Variables 1"
    s1: Stationary "Stationary Solver 1"
      fc1: FullyCoupled | linsolver = i1
      i1: Iterative | linsolver = cg
        mg1: Multigrid | prefun = amg; coarseningmethod = classic
  sol2 "Parametric Solutions 1" (study std1)

Datasets
  dset1: Solution | solution = sol1
  dset2: Solution "Messsonde Lösung 2" | solution = sol1
  avh1: Average "Punkt-Messsonde 1" on points 13 | data = dset2
  avh2: Average "Punkt-Messsonde 2" on points 12 | data = dset2
  dset3: Solution | solution = sol2

Derived values
  int1: IntSurface "Oberflächenintegration 1" | data = dset1; table = tbl1; expr = ec.Jz
  pev1: EvalPoint "Punktauswertung 1" on points 2
    data = dset3
    table = tbl4
    expr = intop1(ec.Jz)/(k*(point2-point1))
    descr = sig_mod
  pev2: EvalPoint "Punkt-Messsonde 1" | data = avh1; table = tbl3; expr = V
  pev3: EvalPoint "Punkt-Messsonde 2" | data = avh2; table = tbl3; expr = V

Plots
  pg1: PlotGroup3D "Elektrisches Potential (ec)" | data = dset1
    vol1: Volume "Volumen 1" | expr = V
  pg2: PlotGroup3D "Betrag des Elektrischen Feldes (ec)" | data = dset1
    mslc1: Multislice "Mehrschnitt 1"
      expr = ec.normE
      multiplanexmethod = coord
      xcoord = ec.CPx
      multiplaneymethod = coord
      ycoord = ec.CPy
      multiplanezmethod = coord
      zcoord = ec.CPz
    strmsl1: StreamlineMultislice "Stromlinien Mehrfachschnitt 1"
      expr = {ec.Ex, ec.Ey, ec.Ez}
      multiplanexmethod = coord
      xcoord = ec.CPx
      multiplaneymethod = coord
      ycoord = ec.CPy
      multiplanezmethod = coord
      zcoord = ec.CPz
      col1: Color "Farbausdruck 1" | expr = ec.normE
      filt1: Filter | expr = !isScalingSystemDomain
  pg3: PlotGroup1D "Messsonde Plotgruppe 3"
    tblp1: Table "Messsonde Tabellengrafik 1" | table = tbl3; xaxisdata = auto; plotcolumns = {2, 3}
  pg5: PlotGroup3D "Electric Potential (ec)" | data = dset3
    vol1: Volume | expr = V
  pg6: PlotGroup3D "Electric Field Norm (ec)" | data = dset3
    mslc1: Multislice
      expr = ec.normE
      multiplanexmethod = coord
      xcoord = ec.CPx
      multiplaneymethod = coord
      ycoord = ec.CPy
      multiplanezmethod = coord
      zcoord = ec.CPz
    strmsl1: StreamlineMultislice
      expr = {ec.Ex, ec.Ey, ec.Ez}
      multiplanexmethod = coord
      xcoord = ec.CPx
      multiplaneymethod = coord
      ycoord = ec.CPy
      multiplanezmethod = coord
      zcoord = ec.CPz
      col1: Color "Color Expression 1" | expr = ec.normE
      filt1: Filter | expr = !isScalingSystemDomain
  pg7: PlotGroup1D "1D Plot Group 7" | data = none
    tblp1: Table "Table Graph 1" | table = tbl4